<?xml version="1.0"?>
<?xml-stylesheet type="text/xsl" href="http://jsbsim.sourceforge.net/JSBSim.xsl"?>
<fdm_config name="777-200" version="2.0" release="ALPHA"
   xmlns:xsi="http://www.w3.org/2001/XMLSchema-instance"
   xsi:noNamespaceSchemaLocation="http://jsbsim.sourceforge.net/JSBSim.xsd">

<fileheader>
  <author>Generated by scripts/generate_jsbsim_aircraft.py</author>
  <description>Boeing 777-200 cruise model, coefficients sourced from config/aircraft_b772.yaml (see that file's header for data provenance/caveats). GENERATED FILE -- edit the YAML and regenerate, do not hand-edit.</description>
</fileheader>

<metrics>
   <wingarea  unit="FT2"> 4604.801 </wingarea>
   <wingspan  unit="FT" > 199.803 </wingspan>
   <chord     unit="FT" > 22.966 </chord>
   <htailarea unit="FT2"> 730.0 </htailarea>
   <htailarm  unit="FT" > 88.0 </htailarm>
   <vtailarea unit="FT2"> 520.0 </vtailarea>
   <vtailarm  unit="FT" > 0 </vtailarm>
   <location name="AERORP" unit="IN"><x>0</x><y>0</y><z>0</z></location>
   <location name="EYEPOINT" unit="IN"><x>-1200</x><y>0</y><z>150</z></location>
   <location name="VRP" unit="IN"><x>0</x><y>0</y><z>0</z></location>
</metrics>

<mass_balance>
   <ixx unit="SLUG*FT2"> 586139902.0 </ixx>
   <iyy unit="SLUG*FT2"> 1065493182.1 </iyy>
   <izz unit="SLUG*FT2"> 1601799327.3 </izz>
   <ixy unit="SLUG*FT2"> 0 </ixy>
   <ixz unit="SLUG*FT2"> 30849468.5 </ixz>
   <iyz unit="SLUG*FT2"> 0 </iyz>
   <emptywt unit="LBS"> 502063.2 </emptywt>
   <location name="CG" unit="IN"><x>0</x><y>0</y><z>0</z></location>
</mass_balance>

<ground_reactions>
  <contact type="BOGEY" name="NOSE_GEAR">
    <location unit="IN"><x>-950</x><y>0</y><z>-170</z></location>
    <static_friction>0.40</static_friction>
    <dynamic_friction>0.30</dynamic_friction>
    <rolling_friction>0.02</rolling_friction>
    <spring_coeff unit="LBS/FT">200000</spring_coeff>
    <damping_coeff unit="LBS/FT/SEC">100000</damping_coeff>
    <max_steer unit="DEG">70</max_steer>
    <brake_group>NONE</brake_group>
    <retractable>1</retractable>
  </contact>
  <contact type="BOGEY" name="LEFT_MAIN">
    <location unit="IN"><x>100</x><y>-200</y><z>-180</z></location>
    <static_friction>0.40</static_friction>
    <dynamic_friction>0.35</dynamic_friction>
    <rolling_friction>0.02</rolling_friction>
    <spring_coeff unit="LBS/FT">1000000</spring_coeff>
    <damping_coeff unit="LBS/FT/SEC">200000</damping_coeff>
    <max_steer unit="DEG">0</max_steer>
    <brake_group>LEFT</brake_group>
    <retractable>1</retractable>
  </contact>
  <contact type="BOGEY" name="RIGHT_MAIN">
    <location unit="IN"><x>100</x><y>200</y><z>-180</z></location>
    <static_friction>0.40</static_friction>
    <dynamic_friction>0.35</dynamic_friction>
    <rolling_friction>0.02</rolling_friction>
    <spring_coeff unit="LBS/FT">1000000</spring_coeff>
    <damping_coeff unit="LBS/FT/SEC">200000</damping_coeff>
    <max_steer unit="DEG">0</max_steer>
    <brake_group>RIGHT</brake_group>
    <retractable>1</retractable>
  </contact>
</ground_reactions>

<propulsion>
  <engine file="GE90-94B">
    <feed>0</feed>
    <thruster file="direct">
      <location unit="IN"><x>1200</x><y>-419.6</y><z>-60</z></location>
      <orient unit="DEG"><pitch>0</pitch><roll>0</roll><yaw>0</yaw></orient>
    </thruster>
  </engine>
  <engine file="GE90-94B">
    <feed>0</feed>
    <thruster file="direct">
      <location unit="IN"><x>1200</x><y>419.6</y><z>-60</z></location>
      <orient unit="DEG"><pitch>0</pitch><roll>0</roll><yaw>0</yaw></orient>
    </thruster>
  </engine>
  <tank type="FUEL" number="0">
    <location unit="IN"><x>0</x><y>0</y><z>0</z></location>
    <capacity unit="LBS">320000</capacity>
    <contents unit="LBS">5000.0</contents>
  </tank>
</propulsion>

<flight_control name="FCS: 777-200">
  <property value="0">fcs/pitch-trim-cmd-norm</property>
  <channel name="Aileron">
    <actuator name="Aileron Actuator">
      <input>fcs/aileron-cmd-norm</input>
      <lag>6.6667</lag>
      <rate_limit>3.0000</rate_limit>
      <clipto><min>-1</min><max>1</max></clipto>
      <output>fcs/aileron-pos-norm</output>
    </actuator>
    <aerosurface_scale name="Aileron to rad">
      <input>fcs/aileron-pos-norm</input>
      <range><min>-0.35000</min><max>0.35000</max></range>
      <output>fcs/aileron-pos-rad</output>
    </aerosurface_scale>
  </channel>
  <channel name="Elevator">
    <actuator name="Elevator Actuator">
      <input>fcs/elevator-cmd-norm</input>
      <lag>5.0000</lag>
      <rate_limit>1.5556</rate_limit>
      <clipto><min>-1</min><max>1</max></clipto>
      <output>fcs/elevator-pos-norm</output>
    </actuator>
    <aerosurface_scale name="Elevator to rad">
      <input>fcs/elevator-pos-norm</input>
      <range><min>-0.45000</min><max>0.45000</max></range>
      <output>fcs/elevator-pos-rad</output>
    </aerosurface_scale>
  </channel>
  <channel name="ElevatorTrim">
    <actuator name="ElevatorTrim Actuator">
      <input>fcs/pitch-trim-cmd-norm</input>
      <lag>1.0000</lag>
      <rate_limit>0.2000</rate_limit>
      <clipto><min>-1</min><max>1</max></clipto>
      <output>fcs/pitch-trim-pos-norm</output>
    </actuator>
    <aerosurface_scale name="ElevatorTrim to rad">
      <input>fcs/pitch-trim-pos-norm</input>
      <range><min>-0.25000</min><max>0.25000</max></range>
      <output>fcs/pitch-trim-pos-rad</output>
    </aerosurface_scale>
  </channel>
  <channel name="Rudder">
    <actuator name="Rudder Actuator">
      <input>fcs/rudder-cmd-norm</input>
      <lag>4.0000</lag>
      <rate_limit>1.5556</rate_limit>
      <clipto><min>-1</min><max>1</max></clipto>
      <output>fcs/rudder-pos-norm</output>
    </actuator>
    <aerosurface_scale name="Rudder to rad">
      <input>fcs/rudder-pos-norm</input>
      <range><min>-0.45000</min><max>0.45000</max></range>
      <output>fcs/rudder-pos-rad</output>
    </aerosurface_scale>
  </channel>
  <channel name="Throttle">
    <actuator name="Throttle Actuator 0">
      <input>fcs/throttle-cmd-norm</input>
      <lag>0.6667</lag>
      <rate_limit>0.3000</rate_limit>
      <clipto><min>0</min><max>1</max></clipto>
      <output>fcs/throttle-pos-norm</output>
    </actuator>
    <actuator name="Throttle Actuator 1">
      <input>fcs/throttle-cmd-norm[1]</input>
      <lag>0.6667</lag>
      <rate_limit>0.3000</rate_limit>
      <clipto><min>0</min><max>1</max></clipto>
      <output>fcs/throttle-pos-norm[1]</output>
    </actuator>
  </channel>
</flight_control>

<aerodynamics>

  <axis name="LIFT">
    <function name="aero/force/Lift_basic">
      <description>CL0 + CL_alpha*alpha</description>
      <product>
        <property>aero/qbar-psf</property>
        <property>metrics/Sw-sqft</property>
        <sum>
          <value>0.25</value>
          <product><value>5.7</value><property>aero/alpha-rad</property></product>
        </sum>
      </product>
    </function>
    <function name="aero/force/Lift_elevator">
      <product>
        <property>aero/qbar-psf</property>
        <property>metrics/Sw-sqft</property>
        <value>0.36</value>
        <property>fcs/elevator-pos-rad</property>
      </product>
    </function>
    <function name="aero/force/Lift_elevator_trim">
      <product>
        <property>aero/qbar-psf</property>
        <property>metrics/Sw-sqft</property>
        <value>0.2</value>
        <property>fcs/pitch-trim-pos-rad</property>
      </product>
    </function>
    <function name="aero/force/Lift_q">
      <product>
        <property>aero/qbar-psf</property>
        <property>metrics/Sw-sqft</property>
        <value>6.5</value>
        <property>aero/ci2vel</property>
        <property>velocities/q-aero-rad_sec</property>
      </product>
    </function>
  </axis>

  <axis name="DRAG">
    <function name="aero/force/Drag_basic">
      <description>CD0 + k*CL^2</description>
      <product>
        <property>aero/qbar-psf</property>
        <property>metrics/Sw-sqft</property>
        <sum>
          <value>0.0195</value>
          <product><value>0.04477570889545926</value><property>aero/cl-squared</property></product>
        </sum>
      </product>
    </function>
  </axis>

  <axis name="SIDE">
    <function name="aero/force/Side_beta">
      <product>
        <property>aero/qbar-psf</property>
        <property>metrics/Sw-sqft</property>
        <value>-0.9</value>
        <property>aero/beta-rad</property>
      </product>
    </function>
    <function name="aero/force/Side_rudder">
      <product>
        <property>aero/qbar-psf</property>
        <property>metrics/Sw-sqft</property>
        <value>0.19</value>
        <property>fcs/rudder-pos-rad</property>
      </product>
    </function>
  </axis>

  <axis name="ROLL">
    <function name="aero/moment/Roll_beta">
      <product>
        <property>aero/qbar-psf</property><property>metrics/Sw-sqft</property><property>metrics/bw-ft</property>
        <value>-0.095</value><property>aero/beta-rad</property>
      </product>
    </function>
    <function name="aero/moment/Roll_p">
      <product>
        <property>aero/qbar-psf</property><property>metrics/Sw-sqft</property><property>metrics/bw-ft</property>
        <value>-0.42</value><property>aero/bi2vel</property><property>velocities/p-aero-rad_sec</property>
      </product>
    </function>
    <function name="aero/moment/Roll_r">
      <product>
        <property>aero/qbar-psf</property><property>metrics/Sw-sqft</property><property>metrics/bw-ft</property>
        <value>0.12</value><property>aero/bi2vel</property><property>velocities/r-aero-rad_sec</property>
      </product>
    </function>
    <function name="aero/moment/Roll_aileron">
      <product>
        <property>aero/qbar-psf</property><property>metrics/Sw-sqft</property><property>metrics/bw-ft</property>
        <value>0.055</value><property>fcs/aileron-pos-rad</property>
      </product>
    </function>
    <function name="aero/moment/Roll_rudder">
      <product>
        <property>aero/qbar-psf</property><property>metrics/Sw-sqft</property><property>metrics/bw-ft</property>
        <value>0.01</value><property>fcs/rudder-pos-rad</property>
      </product>
    </function>
  </axis>

  <axis name="PITCH">
    <function name="aero/moment/Pitch_basic">
      <product>
        <property>aero/qbar-psf</property><property>metrics/Sw-sqft</property><property>metrics/cbarw-ft</property>
        <sum>
          <value>0.02</value>
          <product><value>-1.45</value><property>aero/alpha-rad</property></product>
        </sum>
      </product>
    </function>
    <function name="aero/moment/Pitch_elevator">
      <product>
        <property>aero/qbar-psf</property><property>metrics/Sw-sqft</property><property>metrics/cbarw-ft</property>
        <value>-1.35</value><property>fcs/elevator-pos-rad</property>
      </product>
    </function>
    <function name="aero/moment/Pitch_elevator_trim">
      <product>
        <property>aero/qbar-psf</property><property>metrics/Sw-sqft</property><property>metrics/cbarw-ft</property>
        <value>-1.35</value><property>fcs/pitch-trim-pos-rad</property>
      </product>
    </function>
    <function name="aero/moment/Pitch_q">
      <product>
        <property>aero/qbar-psf</property><property>metrics/Sw-sqft</property><property>metrics/cbarw-ft</property>
        <value>-22.0</value><property>aero/ci2vel</property><property>velocities/q-aero-rad_sec</property>
      </product>
    </function>
  </axis>

  <axis name="YAW">
    <function name="aero/moment/Yaw_beta">
      <product>
        <property>aero/qbar-psf</property><property>metrics/Sw-sqft</property><property>metrics/bw-ft</property>
        <value>0.16</value><property>aero/beta-rad</property>
      </product>
    </function>
    <function name="aero/moment/Yaw_p">
      <product>
        <property>aero/qbar-psf</property><property>metrics/Sw-sqft</property><property>metrics/bw-ft</property>
        <value>-0.02</value><property>aero/bi2vel</property><property>velocities/p-aero-rad_sec</property>
      </product>
    </function>
    <function name="aero/moment/Yaw_r">
      <product>
        <property>aero/qbar-psf</property><property>metrics/Sw-sqft</property><property>metrics/bw-ft</property>
        <value>-0.28</value><property>aero/bi2vel</property><property>velocities/r-aero-rad_sec</property>
      </product>
    </function>
    <function name="aero/moment/Yaw_aileron">
      <product>
        <property>aero/qbar-psf</property><property>metrics/Sw-sqft</property><property>metrics/bw-ft</property>
        <value>-0.006</value><property>fcs/aileron-pos-rad</property>
      </product>
    </function>
    <function name="aero/moment/Yaw_rudder">
      <product>
        <property>aero/qbar-psf</property><property>metrics/Sw-sqft</property><property>metrics/bw-ft</property>
        <value>-0.095</value><property>fcs/rudder-pos-rad</property>
      </product>
    </function>
  </axis>

</aerodynamics>

</fdm_config>
